# Proiectarea unui convertor BUCK
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# 1. Parametri de intrare
# Tensiunea de intrare:
V_out := 5 V
# Tensiunea de iesire:
V_in := 12 V
# Curentul maxim la iesire:
I_out := 3 A
# Frecventa de comutatie:
f_sw := 100 kHz
# Eficienta propusa:
η := 85%
# Riplu impus de curent prin bobina:
ΔI_L := 25%*I_out = 0.75 A
# Riplu impus de tensiune la iesirea convertorului:
ΔV_out := 1%*V_out = 0.05 V
# Riplu impus de tensiune la intrarea convertorului:
ΔV_in := 5%*V_in = 0.6 V
# 2. Functii si formule
# 2.1. Calculul Duratei Relative de Conductie
D_RC == V_out/V_in
T_sw := 1/f_sw = 10 μs
D_RC := V_out/V_in = 0.416667
t_on := D_RC*T_sw = 4.16667 μs
# Demonstratie:
V_L_on*t_on + V_L_off*t_off == 0
V_L_on*D_RC*T_sw + V_out*(1 - D_RC)*T_sw == 0
V_L_on == V_in - V_out
V_L_off == -V_D - V_out
(V_in - V_out)*D_RC*T_sw + (-V_out)*(1 - D_RC)*T == 0
V_in*D_RC*T_sw - V_out*D_RC*T_sw - V_out*T_ssw + V_out*D_RC*T_sw == 0
D_RC*V_in == V_out
D_RC == V_out/V_in
# 2.2. Selectarea bobinei
L := (V_in - V_out)*D_RC/(ΔI_L*f_sw) = 38.8889 μH
I_L_max := I_out + ΔI_L/2 = 3.375 A
I_L_min := I_out - ΔI_L/2 = 2.625 A
# Demonstratie:
V_L == V_in - V_out == L*di/dt
t_on == D_RC*T_sw == D_RC/f_sw
T_sw := 1/f_sw = 1e-5 s
t_off := T_sw - t_on
L == V_L*dt/di == V_L*t_on/ΔI_L == (V_in - V_out)*D_RC/(ΔI_L*f_sw)
# 2.3. Selectarea condensatorului
C_out := T_sw*ΔI_L/(8*ΔV_out) = 18.75 μF
# Demonstratie:
I_c == C*dV/dt
dQ == C*dV == D_RC*dt
dQ == 1/2*Aria_dreptunghi == b*h/2
C == dQ/dV == 1/2*(t_on/2 + t_off/2)*ΔI_L/2*1/dV
C == 1/2*T_sw/2*ΔI_L/2*1/ΔV_out == 1/8*T_sw*ΔI_L/ΔV_out
I_in := V_out*I_out/(η*V_in) = 1.47059 A
I_c_min := I_in - I_out + ΔI_L/2 = -1.15441 A
I_c_max := I_in - I_out - ΔI_L/2 = -1.90441 A
C_in := (I_c_min + I_c_max)*t_on/(2*ΔV_in) = -10.6209 μF
# Demonstratie:
I_c == C*dV/dt
dQ == C*dV == D_RC*dt
dQ == Aria_trapez == (B + b)*h/2
C == dQ/dV == 1/2*(I_c_min + I_c_max)*1/dV == 1/2*(I_c_min + I_c_max)/ΔV_in
# 3. Conditii de operare
# Puterea de iesire:
P_out := V_out*I_out = 15 W
# Puterea de intrare necesara:
P_in := P_out/η = 17.6471 W
# Curentul de intrare:
I_in := P_in/V_in = 1.47059 A
# Curentul prin bobina:
# T_o_n:
i_on(t) := t(I_L_max - I_L_min)/t_on + I_L_min
# T_o_f_f:
i_off(t) := (t - t_on)*(I_L_min - I_L_max)/(T_sw - t_on) + I_L_max
# Trasare grafic:
t := 0 μs, 0.1 μs .. T_sw
i_L(t) :=
    if 0 s < t ≤ t_on
        (I_L_max - I_L_min)/t_on*t + I_L_min
    if t_on < t ≤ T_sw
        (I_L_min - I_L_max)/(T_sw - t_on)*(t - t_on) + I_L_max
# [plot: i_L(t) vs t]
# Curentul prin tranzistor: | Pe T_o_n curentul este condus de tranzistor.
# Trasare grafic:
i_T(t) :=
    if 0 s < t ≤ t_on
        (I_L_max - I_L_min)/t_on*t + I_L_min
    if t_on < t ≤ T_sw
        0
# [plot: i_T(t) vs t]
# Curentul prin dioda: | Pe T_o_ff curentul este condus de dioda.
# Trasare grafic:
i_D(t) :=
    if 0 s < t ≤ t_on
        0
    if t_on < t ≤ T_sw
        (I_L_min - I_L_max)/(T_sw - t_on)*(t - t_on) + I_L_max
# [plot: i_D(t) vs t]
# Curentul prin condensator:
# T_o_n:
i_on(t) := (I_c_max - I_c_min)*t/t_on + I_c_max
# Trasare grafic:
i_C_in(t) :=
    if 0 s < t ≤ t_on
        (I_c_max - I_c_min)/t_on*t + I_c_max
    if t_on < t ≤ T_sw
        I_in
    if t > T_sw
        C_in*(t - T_sw)
# [plot: i_C_in(t) vs t]
i_C_out(t) :=
    if 0 s < t ≤ t_on
        ΔI_L/t_on*t - ΔI_L/2
    if t_on < t ≤ T_sw
        (-ΔI_L)/(T_sw - t_on)*(t - t_on) + ΔI_L/2
# [plot: i_C_out(t) vs t]
# RMS (root mean square) function of current:
RMS(F_sw, I) := sqrt(F_sw*integral(I(t)^2, t = 0 .. 1/F_sw))
RMS(f_sw, i_L) = 3.0078 A
# [plot: RMS(f_sw, i_L) vs t]
# [plot: RMS(f_sw, i_D) vs t]
RMS(f_sw, i_D) = 2.29725
RMS(f_sw, i_T) = 1.94153 A
RMS(f_sw, i_C_out) = 0.216505 A
RMS(f_sw, i_C_in) = 1.85633 A
# [plot: RMS(f_sw, i_T) vs t]
# [plot: RMS(f_sw, i_C_in) vs t]
# [plot: RMS(f_sw, i_C_out) vs t]
